#include "../../libdef.any"
#include "../../FootGM/GM_Foot_libdef.any"

//
/** ----------------------------------------------------------------------------
This model uses the full body model, i.e. most of the body parts available
in the AAUHuman part of the Body directory. The model is grounded at the
pelvis and the posture if the model is controlled through a mannequin.any
file by means of joint angles.

This application uses the Glasgow-Maastricht Foot Model.
---------------------------------------------------------------------------- */
Main = {

   // Setup required for using th GM foot model
   #define BM_LEG_MODEL _LEG_MODEL_TLEM2_
   #define BM_FOOT_MODEL _FOOT_MODEL_NONE_
   //

   #define BM_SCALING _SCALING_XYZ_


   #include "<GM_FOOT_PATH>/GM_foot_model.any"

  AnyFolder Model={

    AnyFolder &HumanModel=.HumanModel.BodyModel;

    #include "Model/Environment.any"

    // The Mannequin file specifies load-time positions for all the segments
    // in the HumanModel. This is important for the model's ablity to resolve
    // all the kinematic constraints when the model is analyzed.
    // The mannequin file also drives those degrees of freedom of the human
    // model that are not governed by problem-specific drivers at run time.
    #include "Model/Mannequin.any"


    AnyFolder ModelEnvironmentConnection = {
      AnyFolder &HumanModel=.HumanModel;
      #include "Model/JointsAndDrivers.any"
    };
  };

  AnyBodyStudy Study = {
    AnyFolder &Model = .Model;

    tStart = 0;
    tEnd = 1.0;
    Gravity = {0.0, -9.81, 0.0};
    nStep = 1;

    InitialConditions.KinematicTol = Kinematics.KinematicTol;
    Kinematics.KinematicTol = 1e-5;
  }; // End of study

}; //Main
