//Seg.DummySegTaloCrural.Axes0 =
////Main.Model.EnvironmentModel.Tibia.Axes0*
////Main.Model.EnvironmentModel.Tibia.AnkleJnt.ARel*
//RotMat(.Sign*(-0.74*.JointPos.AnklePlantarFlexion-7.48)*pi/180,x);

//Seg.Talus.Axes0 =
//Seg.DummySegTaloCrural.Axes0*
//Seg.DummySegTaloCrural.JntTaloCrural.ARel*
//RotMat((pi/180)*.JointPos.AnklePlantarFlexion,z)*
//Seg.Talus.JntTaloCrural.ARel';


//Seg.DummySegSubtalar.Axes0 =
//Seg.Talus.Axes0*
//Seg.Talus.JntTaloCalcaneus.ARel*
//RotMat((pi/180)*.Sign*0.35*.JointPos.SubTalarEversion,x)*
//Seg.DummySegSubtalar.JntTaloCalcaneus1.ARel';


//Seg.Calcaneus.Axes0 =
//Seg.DummySegSubtalar.Axes0*
//Seg.DummySegSubtalar.JntTaloCalcaneus2.ARel*
//Seg.DummySegSubtalar.JntTaloCalcaneus2.RotNode.ARel*
//RotMat((pi/180)*.JointPos.SubTalarEversion,y)*
//Seg.Calcaneus.JntTaloCalcaneus.RotNode.ARel'*
//Seg.Calcaneus.JntTaloCalcaneus.ARel';


//Talus
Seg.Talus.Axes0 =
Seg.Shank.Axes0*
Seg.Shank.AnkleJoint.ARel*
RotMat((-pi/180)*.JointPos.AnklePlantarFlexion ,z)*
Seg.Talus.AnkleJoint.ARel';


//Foot
Seg.Calcaneus.Axes0 =
Seg.Talus.Axes0*
Seg.Talus.SubTalarJoint.ARel*
RotMat((pi/180)*.JointPos.SubTalarEversion ,z)*
Seg.Foot.SubTalarJoint.ARel';


Seg.Cuboid.Axes0 =
Seg.Calcaneus.Axes0*
Seg.Calcaneus.CalcaneoCuboidJoint.ARel*
Seg.Calcaneus.CalcaneoCuboidJoint.RotNode.ARel*
RotMat((pi/180)*.JointPos.CalcaneoCuboidDorsiFlexion,z)*
RotMat((pi/180)*.JointPos.CalcaneoCuboidAbduction,y)*
RotMat((pi/180)*.JointPos.CalcaneoCuboidEversion,x)*
Seg.Cuboid.CalcaneoCuboidJoint.RotNode.ARel'*
Seg.Cuboid.CalcaneoCuboidJoint.ARel';


Seg.Navicular.Axes0 =
Seg.Talus.Axes0*
Seg.Talus.TaloNavicularJoint.ARel*
Seg.Talus.TaloNavicularJoint.RotNode.ARel*
RotMat((pi/180)*.JointPos.TaloNavicularDorsiFlexion,z)*
RotMat((pi/180)*.JointPos.TaloNavicularAbduction,y)*
RotMat((pi/180)*.JointPos.TaloNavicularEversion,x)*
Seg.Navicular.TaloNavicularJoint.RotNode.ARel'*
Seg.Navicular.TaloNavicularJoint.ARel';


Seg.MedialCuneiform.Axes0 =
Seg.Navicular.Axes0*
Seg.Navicular.MedCuneiNaviJoint.ARel*
Seg.Navicular.MedCuneiNaviJoint.RotNode.ARel*
RotMat((pi/180)*.JointPos.NaviculoMedialCuneiformDorsiFlexion,z)*
RotMat((pi/180)*.JointPos.NaviculoMedialCuneiformAbduction,y)*
Seg.MedialCuneiform.CuneiNaviJoint.RotNode.ARel'*
Seg.MedialCuneiform.CuneiNaviJoint.ARel';


Seg.IntermediateCuneiform.Axes0 =
Seg.Navicular.Axes0*
Seg.Navicular.IntCuneiNaviJoint.ARel*
Seg.Navicular.IntCuneiNaviJoint.RotNode.ARel*
RotMat((pi/180)*.JointPos.NaviculoIntermediateCuneiformDorsiFlexion,z)*
RotMat((pi/180)*.JointPos.NaviculoIntermediateCuneiformAbduction,y)*
Seg.IntermediateCuneiform.CuneiNaviJoint.RotNode.ARel'*
Seg.IntermediateCuneiform.CuneiNaviJoint.ARel';


Seg.LateralCuneiform.Axes0 =
Seg.Navicular.Axes0*
Seg.Navicular.LatCuneiNaviJoint.ARel*
Seg.Navicular.LatCuneiNaviJoint.RotNode.ARel*
RotMat((pi/180)*.JointPos.NaviculoLateralCuneiformDorsiFlexion,z)*
RotMat((pi/180)*.JointPos.NaviculoLateralCuneiformAbduction,y)*
Seg.LateralCuneiform.CuneiNaviJoint.RotNode.ARel'*
Seg.LateralCuneiform.CuneiNaviJoint.ARel';


Seg.Metatarsal1.Axes0 =
Seg.MedialCuneiform.Axes0*
Seg.MedialCuneiform.TarsoMtJoint.ARel*
Seg.MedialCuneiform.TarsoMtJoint.RotNode.ARel*
RotMat((pi/180)*.JointPos.TarsoMetatarsal1DorsiFlexion,z)*
RotMat((pi/180)*.JointPos.TarsoMetatarsal1Abduction,y)*
Seg.Metatarsal1.TarsoMtJoint.RotNode.ARel'*
Seg.Metatarsal1.TarsoMtJoint.ARel';


Seg.Metatarsal2.Axes0 =
Seg.IntermediateCuneiform.Axes0*
Seg.IntermediateCuneiform.TarsoMtJoint.ARel*
Seg.IntermediateCuneiform.TarsoMtJoint.RotNode.ARel*
RotMat((pi/180)*.JointPos.TarsoMetatarsal2DorsiFlexion,z)*
RotMat((pi/180)*.JointPos.TarsoMetatarsal2Abduction,y)*
Seg.Metatarsal2.TarsoMtJoint.RotNode.ARel'*
Seg.Metatarsal2.TarsoMtJoint.ARel';


Seg.Metatarsal3.Axes0 =
Seg.LateralCuneiform.Axes0*
Seg.LateralCuneiform.TarsoMtJoint.ARel*
Seg.LateralCuneiform.TarsoMtJoint.RotNode.ARel*
RotMat((pi/180)*.JointPos.TarsoMetatarsal3DorsiFlexion,z)*
RotMat((pi/180)*.JointPos.TarsoMetatarsal3Abduction,y)*
Seg.Metatarsal3.TarsoMtJoint.RotNode.ARel'*
Seg.Metatarsal3.TarsoMtJoint.ARel';


Seg.Metatarsal4.Axes0 =
Seg.Cuboid.Axes0*
Seg.Cuboid.TarsoMt4Joint.ARel*
Seg.Cuboid.TarsoMt4Joint.RotNode.ARel*
RotMat((pi/180)*.JointPos.TarsoMetatarsal4DorsiFlexion,z)*
RotMat((pi/180)*.JointPos.TarsoMetatarsal4Abduction,y)*
Seg.Metatarsal4.TarsoMtJoint.RotNode.ARel'*
Seg.Metatarsal4.TarsoMtJoint.ARel';


Seg.Metatarsal5.Axes0 =
Seg.Cuboid.Axes0*
Seg.Cuboid.TarsoMt5Joint.ARel*
Seg.Cuboid.TarsoMt5Joint.RotNode.ARel*
RotMat((pi/180)*.JointPos.TarsoMetatarsal5Abduction,y)*
RotMat((pi/180)*.JointPos.TarsoMetatarsal5SkewDorsiFlexion,z)*
Seg.Metatarsal5.TarsoMtJoint.RotNode.ARel'*
Seg.Metatarsal5.TarsoMtJoint.ARel';


Seg.ProximalPhalange1.Axes0 =
Seg.Metatarsal1.Axes0*
Seg.Metatarsal1.MtPhalJoint.ARel*
Seg.Metatarsal1.MtPhalJoint.RotNode.ARel*
RotMat((pi/180)*.JointPos.MetatarsoPhalangeal1DorsiFlexion,z)*
RotMat((pi/180)*.JointPos.MetatarsoPhalangeal1Abduction,y)*
Seg.ProximalPhalange1.MtPhalJoint.RotNode.ARel'*
Seg.ProximalPhalange1.MtPhalJoint.ARel';


Seg.ProximalPhalange2.Axes0 =
Seg.Metatarsal2.Axes0*
Seg.Metatarsal2.MtPhalJoint.ARel*
Seg.Metatarsal2.MtPhalJoint.RotNode.ARel*
RotMat((pi/180)*.JointPos.MetatarsoPhalangeal2DorsiFlexion,z)*
RotMat((pi/180)*.JointPos.MetatarsoPhalangeal2Abduction,y)*
Seg.ProximalPhalange2.MtPhalJoint.RotNode.ARel'*
Seg.ProximalPhalange2.MtPhalJoint.ARel';


Seg.ProximalPhalange3.Axes0 =
Seg.Metatarsal3.Axes0*
Seg.Metatarsal3.MtPhalJoint.ARel*
Seg.Metatarsal3.MtPhalJoint.RotNode.ARel*
RotMat((pi/180)*.JointPos.MetatarsoPhalangeal3DorsiFlexion,z)*
RotMat((pi/180)*.JointPos.MetatarsoPhalangeal3Abduction,y)*
Seg.ProximalPhalange3.MtPhalJoint.RotNode.ARel'*
Seg.ProximalPhalange3.MtPhalJoint.ARel';


Seg.ProximalPhalange4.Axes0 =
Seg.Metatarsal4.Axes0*
Seg.Metatarsal4.MtPhalJoint.ARel*
Seg.Metatarsal4.MtPhalJoint.RotNode.ARel*
RotMat((pi/180)*.JointPos.MetatarsoPhalangeal4DorsiFlexion,z)*
RotMat((pi/180)*.JointPos.MetatarsoPhalangeal4Abduction,y)*
Seg.ProximalPhalange4.MtPhalJoint.RotNode.ARel'*
Seg.ProximalPhalange4.MtPhalJoint.ARel';


Seg.ProximalPhalange5.Axes0 =
Seg.Metatarsal5.Axes0*
Seg.Metatarsal5.MtPhalJoint.ARel*
Seg.Metatarsal5.MtPhalJoint.RotNode.ARel*
RotMat((pi/180)*.JointPos.MetatarsoPhalangeal5DorsiFlexion,z)*
RotMat((pi/180)*.JointPos.MetatarsoPhalangeal5Abduction,y)*
Seg.ProximalPhalange5.MtPhalJoint.RotNode.ARel'*
Seg.ProximalPhalange5.MtPhalJoint.ARel';


Seg.MiddlePhalange2.Axes0 =
Seg.ProximalPhalange2.Axes0*
Seg.ProximalPhalange2.ProxPhalJoint.ARel*
RotMat((pi/180)*.JointPos.ProximoMedialPhalange2DorsiFlexion,z)*
Seg.MiddlePhalange2.ProxPhalJoint.ARel';


Seg.MiddlePhalange3.Axes0 =
Seg.ProximalPhalange3.Axes0*
Seg.ProximalPhalange3.ProxPhalJoint.ARel*
RotMat((pi/180)*.JointPos.ProximoMedialPhalange3DorsiFlexion,z)*
Seg.MiddlePhalange3.ProxPhalJoint.ARel';


Seg.MiddlePhalange4.Axes0 =
Seg.ProximalPhalange4.Axes0*
Seg.ProximalPhalange4.ProxPhalJoint.ARel*
RotMat((pi/180)*.JointPos.ProximoMedialPhalange4DorsiFlexion,z)*
Seg.MiddlePhalange4.ProxPhalJoint.ARel';


Seg.MiddlePhalange5.Axes0 =
Seg.ProximalPhalange5.Axes0*
Seg.ProximalPhalange5.ProxPhalJoint.ARel*
RotMat((pi/180)*.JointPos.ProximoMedialPhalange5DorsiFlexion,z)*
Seg.MiddlePhalange5.ProxPhalJoint.ARel';


Seg.DistalPhalange1.Axes0 =
Seg.ProximalPhalange1.Axes0*
Seg.ProximalPhalange1.DistPhalJoint.ARel*
RotMat((pi/180)*.JointPos.ProximoDistalPhalange1DorsiFlexion,z)*
Seg.DistalPhalange1.DistPhalJoint.ARel';


Seg.DistalPhalange2.Axes0 =
Seg.MiddlePhalange2.Axes0*
Seg.MiddlePhalange2.DistPhalJoint.ARel*
RotMat((pi/180)*.JointPos.MedioDistalPhalange2DorsiFlexion,z)*
Seg.DistalPhalange2.DistPhalJoint.ARel';


Seg.DistalPhalange3.Axes0 =
Seg.MiddlePhalange3.Axes0*
Seg.MiddlePhalange3.DistPhalJoint.ARel*
RotMat((pi/180)*.JointPos.MedioDistalPhalange3DorsiFlexion,z)*
Seg.DistalPhalange3.DistPhalJoint.ARel';


Seg.DistalPhalange4.Axes0 =
Seg.MiddlePhalange4.Axes0*
Seg.MiddlePhalange4.DistPhalJoint.ARel*
RotMat((pi/180)*.JointPos.MedioDistalPhalange4DorsiFlexion,z)*
Seg.DistalPhalange4.DistPhalJoint.ARel';


Seg.DistalPhalange5.Axes0 =
Seg.MiddlePhalange5.Axes0*
Seg.MiddlePhalange5.DistPhalJoint.ARel*
RotMat((pi/180)*.JointPos.MedioDistalPhalange5DorsiFlexion,z)*
Seg.DistalPhalange5.DistPhalJoint.ARel';
