AnyFolder &Seg = .Seg;

Seg = {

  //FDL Muscle control seg
  //*******************


  AnySeg FDLControlSeg =
  {
    r0=.MedialCuneiform.r0+.MedialCuneiform.FDLSegNode.sRel*.MedialCuneiform.Axes0';
    Axes0 = .MedialCuneiform.Axes0; //*RotMat(-10*pi/180,x);
    Mass = 0;
    Jii = {0, 0, 0};
//    AnyDrawRefFrame drw={ScaleXYZ=3*{0.01,0.01,0.01};RGB={0,0,1};};
  };


  AnySphericalJoint FDLControlSegJnt =
  {
    AnyRefFrame &ref1 = .MedialCuneiform.FDLSegNode;
    AnyRefFrame &ref2 = .FDLControlSeg;
  };


  AnyKinEq FDLControlSegDriver =
  {
    AnyKinMeasureOrg Measure1 = {
      MeasureOrganizer = {0,1};
      AnyKinLinear Lin =
      {
        Ref = 0;
        AnyRefFrame &ref1 = ...FDLControlSeg;
        AnyRefFrame &ref2 = ...Metatarsal5.FDLSegNode;
      };
    };
    AnyKinMeasureOrg Measure2 = {
      MeasureOrganizer = {0};
      AnyKinLinear Lin =
      {
        Ref = 0;
        AnyRefFrame &ref1 = ...FDLControlSeg;
        AnyRefFrame &ref2 = ...Calcaneus.SustentaculumTali;
      };
    };
    Reaction.Type = {On, On, On};
  };


  AnySeg FDLDummySeg =
  {
    r0=.FDLControlSeg.r0+{0, 0, ...Sign*0.02}*.FDLControlSeg.Axes0' - JntNode.sRel*Axes0';
    Axes0 = .FDLControlSeg.Axes0;
    Mass = 0;
    Jii = {0, 0, 0};
    AnyFunTransform3D &Scale = ...GeoScaling.Foot.ScaleFunction;

    AnyDrawSurf DrawSeg =
    {
      FileName = "FDLseg";
      Visible = On;
      Opacity = 1;
      RGB = Main.DrawSettings.Muscle.RGBColorScale;
      AnyFunTransform3D &Scale = .Scale;
      ScaleXYZ = {1, 1, ....Sign*1};
    };

    AnyRefNode JntNode = {
      sRel = .Scale({0.002893189, 0.006984237, ....Sign*0.005438805});
    };

    AnyRefNode QP_Ins3 = {
      sRel = .Scale({0.002893189, 0.007592162, ....Sign*0.01217787});
      AnyDrawNode drw = {RGB={0,1,0};ScaleXYZ=0.2*{0.01,0.01,0.01};};
    };

    AnyRefNode QP_Ins2 = {
      sRel = .Scale({0.002893189, 0.02155803, ....Sign*0.005604602});
      AnyDrawNode drw = {RGB={0,1,0};ScaleXYZ=0.2*{0.01,0.01,0.01};};
    };

    AnyRefNode QP_Ins1 = {
      sRel = .Scale({0.002893189, 0.03550729, ....Sign*-0.001349241});
      AnyDrawNode drw = {RGB={0,1,0};ScaleXYZ=0.2*{0.01,0.01,0.01};};
    };

    AnyRefNode LB5_Org = {
      sRel = .Scale({0.002893189, 0.003555229, ....Sign*0.01345044});
      AnyDrawNode drw = {RGB={0,1,0};ScaleXYZ=0.2*{0.01,0.01,0.01};};
    };

    AnyRefNode LB4_Org = {
      sRel = .Scale({0.002893189, 0.001337712, ....Sign*0.009754376});
      AnyDrawNode drw = {RGB={0,1,0};ScaleXYZ=0.2*{0.01,0.01,0.01};};
    };

    AnyRefNode LB3_Org = {
      sRel = .Scale({0.002893189, 0.001404411, ....Sign*0.00586068});
      AnyDrawNode drw = {RGB={0,1,0};ScaleXYZ=0.2*{0.01,0.01,0.01};};
    };

    AnyRefNode LB2_Org = {
      sRel = .Scale({0.002893189, 0.004477923, ....Sign*0.001722163});
      AnyDrawNode drw = {RGB={0,1,0};ScaleXYZ=0.2*{0.01,0.01,0.01};};
    };

    AnyRefNode FlexorDigitorumLongusViaNode8 = {
      sRel = .Scale({0.002893189, 0.03550729, ....Sign*-0.003349241});
      AnyDrawNode drw = {RGB={0,1,0};ScaleXYZ=0.2*{0.01,0.01,0.01};};
    };

    //AnyDrawRefFrame drw={ScaleXYZ=1.5*{0.01,0.01,0.01};RGB={0,1,0};};
  };


  AnyPrismaticJoint FDLDummySegJnt =
  {
    Axis = z;
    Ref = 0;
    AnyRefFrame &ControlSeg = .FDLControlSeg;
    AnyRefFrame &DummySef = .FDLDummySeg.JntNode;
    Constraints.Reaction.Type = {Off, Off, Off, Off, Off};
  };


  AnyKinEq FDLDummySegDriver = {
    AnyKinMeasureLinComb LinComb =
    {
      AnyKinMeasureOrg Measure1 = {
        MeasureOrganizer = {2};
        AnyKinLinear Lin =
        {
          Ref = 0;
          AnyRefFrame &ref1 = ....FDLControlSeg;
          AnyRefFrame &ref2 = ....Metatarsal5.FDLSegNode;
        };
      };
      AnyPrismaticJoint &Jnt = ..FDLDummySegJnt;
      OutDim = 1;
      Coef = {{1, -2.5}};
    };
    Reaction.Type = {Off};
  };

  AnyReacForce FDLDummySegSupport = {

//    AnyKinMeasureOrg Organiser =
//    {
//      MeasureOrganizer = {0,3,4};
//      AnyKinLinear Lin =
//      {
//        Ref = 0;
//        AnyRefFrame &ref1 = ...Navicular;
//        AnyRefFrame &ref2 = ...FDLDummySeg;
//      };
//      AnyKinRotational Rot =
//      {
//        Type = RotAxesAngles;
//        Axis1 = z;
//        Axis2 = y;
//        Axis3 = x;
//        AnyRefFrame &ref1 = ...Navicular;
//        AnyRefFrame &ref2 = ...FDLDummySeg;
//      };
//    };

    AnyKinMeasureOrg Organiser =
    {
      MeasureOrganizer = {0,3,6};
      AnyKinLinear Lin1 =
      {
        Ref = 0;
        AnyRefFrame &ref1 = ...Navicular;
        AnyRefFrame &ref2 = ...FDLDummySeg.FlexorDigitorumLongusViaNode8;
      };
      AnyKinLinear Lin2 =
      {
        Ref = 0;
        AnyRefFrame &ref1 = ...IntermediateCuneiform;
        AnyRefFrame &ref2 = ...FDLDummySeg.LB2_Org;
      };
      AnyKinLinear Lin3 =
      {
        Ref = 0;
        AnyRefFrame &ref1 = ...LateralCuneiform;
        AnyRefFrame &ref2 = ...FDLDummySeg.LB5_Org;
      };
    };

  };


};//Seg
