//The data for muscles atachment points come from:
//Musculotendon Parameters and Musculoskeletal Pathways Within the Human Foot. Gary T. Yamaguchi et al. Journal of Applied Biomechanics, 2007; 23:20-41. 2007
//
//The subject 4 has been choosen for his relatively standard foot size.

AnyFolder &Segments = .Seg;


//***********
//Mus digit 1
//***********

AnyViaPointMuscle AbductorHallucis =
{
  AnyMuscleModel &MusMdl = ..MusPar.AbductorHallucis;
  AnyRefFrame &Org =. Segments.Calcaneus.ABDH_Org;
  AnyRefFrame &Via = .Segments.Navicular.ABDH_Via; //Navi
  AnyRefFrame &Via2 = .Segments.Metatarsal1.ABDH_Via; //MT1
  AnyRefFrame &Ins = .Segments.ProximalPhalange1.ABDH_Ins; // proxi1
  AnyDrawMuscle DrwMus = {#include "<ANYBODY_PATH_BODY>/drawSettings/MusDrawSettings.any"};
};


AnyViaPointMuscle FlexorHallucisBrevisLateralis =
{
  AnyMuscleModel &MusMdl = ..MusPar.FlexorHallucisBrevisLateralis;
  AnyRefFrame &Org =. Segments.Navicular.FHBL_Org;  // Navi (or cuboid?)
  AnyRefFrame &Via = .Segments.Metatarsal1.FHBL_Via; //MT1
  AnyRefFrame &Via2 = .Segments.Metatarsal1.FHBL_Via2; //MT1
  AnyRefFrame &Ins = .Segments.ProximalPhalange1.FHBL_Ins; // proxi1
  AnyDrawMuscle DrwMus = {#include "<ANYBODY_PATH_BODY>/drawSettings/MusDrawSettings.any"};
};


AnyViaPointMuscle FlexorHallucisBrevisMedialis =
{
  AnyMuscleModel &MusMdl = ..MusPar.FlexorHallucisBrevisMedialis;
  AnyRefFrame &Org =. Segments.Navicular.FHBM_Org;  // Navi (or cuboid?)
  AnyRefFrame &Via = .Segments.Metatarsal1.FHBM_Via; //MT1
  AnyRefFrame &Via2 = .Segments.Metatarsal1.FHBM_Via2; //MT1
  AnyRefFrame &Ins = .Segments.ProximalPhalange1.FHBM_Ins; // proxi1
  AnyDrawMuscle DrwMus = {#include "<ANYBODY_PATH_BODY>/drawSettings/MusDrawSettings.any"};
};


AnyViaPointMuscle AdductorHallucisOblique1 =
{
  AnyMuscleModel &MusMdl = ..MusPar.AdductorHallucisOblique1;
  AnyRefFrame &Org = .Segments.Metatarsal2.ADHO_Org1;  // base of MT2, MT3, MT4 according to Takamitsu
  AnyRefFrame &Via = .Segments.Metatarsal1.ADHO_Via; //MT1
  AnyRefFrame &Ins = .Segments.ProximalPhalange1.ADHO_Ins; // proxi1
  AnyDrawMuscle DrwMus = {#include "<ANYBODY_PATH_BODY>/drawSettings/MusDrawSettings.any"};
};

AnyViaPointMuscle AdductorHallucisOblique2 =
{
  AnyMuscleModel &MusMdl = ..MusPar.AdductorHallucisOblique2;
  AnyRefFrame &Org = .Segments.Metatarsal3.ADHO_Org2;  // base of MT2, MT3, MT4 according to Takamitsu
  AnyRefFrame &Via = .Segments.Metatarsal1.ADHO_Via; //MT1
  AnyRefFrame &Ins = .Segments.ProximalPhalange1.ADHO_Ins; // proxi1
  AnyDrawMuscle DrwMus = {#include "<ANYBODY_PATH_BODY>/drawSettings/MusDrawSettings.any"};
};

AnyViaPointMuscle AdductorHallucisOblique3 =
{
  AnyMuscleModel &MusMdl = ..MusPar.AdductorHallucisOblique3;
  AnyRefFrame &Org = .Segments.Metatarsal4.ADHO_Org3;  // base of MT2, MT3, MT4 according to Takamitsu
  AnyRefFrame &Via = .Segments.Metatarsal1.ADHO_Via; //MT1
  AnyRefFrame &Ins = .Segments.ProximalPhalange1.ADHO_Ins; // proxi1
  AnyDrawMuscle DrwMus = {#include "<ANYBODY_PATH_BODY>/drawSettings/MusDrawSettings.any"};
};


AnyViaPointMuscle AdductorHallucisTransverse1 =
{
  AnyMuscleModel &MusMdl = ..MusPar.AdductorHallucisTransverse1;
  AnyRefFrame &Org1 =. Segments.Metatarsal3.ADHT_Org1;  // MT3
  AnyRefFrame &Via = .Segments.Metatarsal1.ADHT_Via; //MT1
  AnyRefFrame &Ins = .Segments.ProximalPhalange1.ADHT_Ins; // proxi1
  AnyDrawMuscle DrwMus = {#include "<ANYBODY_PATH_BODY>/drawSettings/MusDrawSettings.any"};
};


AnyViaPointMuscle AdductorHallucisTransverse2 =
{
  AnyMuscleModel &MusMdl = ..MusPar.AdductorHallucisTransverse2;
  AnyRefFrame &Org2 =. Segments.Metatarsal4.ADHT_Org2;  // MT4
  AnyRefFrame &Via = .Segments.Metatarsal1.ADHT_Via; //MT1
  AnyRefFrame &Ins = .Segments.ProximalPhalange1.ADHT_Ins; // proxi1
  AnyDrawMuscle DrwMus = {#include "<ANYBODY_PATH_BODY>/drawSettings/MusDrawSettings.any"};
};


// Should be added according to :
//Anatomical study of human adductor hallucis muscle with respect to its origin and insertion. Takamitsu Arakawa, 2003

AnyViaPointMuscle AdductorHallucisTransverse3 =
{
  AnyMuscleModel &MusMdl = ..MusPar.AdductorHallucisTransverse3;
  AnyRefFrame &Org2 =. Segments.Metatarsal5.ADHT_Org3;  // MT5
  AnyRefFrame &Via = .Segments.Metatarsal1.ADHT_Via; //MT1
  AnyRefFrame &Ins = .Segments.ProximalPhalange1.ADHT_Ins; // proxi1
  AnyDrawMuscle DrwMus = {#include "<ANYBODY_PATH_BODY>/drawSettings/MusDrawSettings.any"};
};


// insertion in proximal phalanx
AnyViaPointMuscle ExtensorHallucisBrevis =
{
  AnyMuscleModel &MusMdl = ..MusPar.ExtensorHallucisBrevis;
  AnyRefFrame &Org =. Segments.Calcaneus.EHB_Org;  // calcaneus
  AnyRefFrame &Via1 = .Segments.IntermediateCuneiform.EHB_Via1; //intermediate cunei
  AnyRefFrame &Via2 = .Segments.Metatarsal1.EHB_Via2; //MT1
  AnyRefFrame &Ins1 = .Segments.Metatarsal1.EHB_Ins1; // MT1
  AnyRefFrame &Ins2 = .Segments.ProximalPhalange1.EHB_Ins2; // proxi 1
  AnyDrawMuscle DrwMus = {#include "<ANYBODY_PATH_BODY>/drawSettings/MusDrawSettings.any"};
};


//This one is modified according to Takamitsu and moved to MT2, MT3, MT4.

//Segments.LateralCuneiform.MusclesRefFrame = {
//  AnyRefNode ADHO_Org = {
//    sRel = (({0.02719, 0.08696, -0.00977}*...MuscleRefFrameTransformation.CalcaneusMusRefAxes'*...MuscleRefFrameTransformation.LateralCuneiformMusRefAxes) + (...MuscleRefFrameTransformation.CalcaneusMusRefr-...MuscleRefFrameTransformation.LateralCuneiformMusRefr)*...MuscleRefFrameTransformation.LateralCuneiformMusRefAxes)*.Mirror*.MusScaleMat*..ScaleMat;
//    AnyDrawNode drw = {
//      ScaleXYZ = 0.0016*{1,1,1};
//      RGB = {0,0,1};
//    };
//  };
//};//LateralCuneiform


//Modified according to Takamitsu

//Segments.Metatarsal3.MusclesRefFrame = {
//  AnyRefNode ADHT_Org1 = {
//    sRel = (({0.00137, 0.1358, -0.00917}*...MuscleRefFrameTransformation.CalcaneusMusRefAxes'*...MuscleRefFrameTransformation.Metatarsal3MusRefAxes) + (...MuscleRefFrameTransformation.CalcaneusMusRefr-...MuscleRefFrameTransformation.Metatarsal3MusRefr)*...MuscleRefFrameTransformation.Metatarsal3MusRefAxes)*.Mirror*.MusScaleMat*..ScaleMat;
//    AnyDrawNode drw = {
//      ScaleXYZ = 0.0016*{1,1,1};
//      RGB = {0,0,1};
//    };
//  };
//};//Metatarsal3
//
//Segments.Metatarsal4.MusclesRefFrame = {
//  AnyRefNode ADHT_Org2 = {
//    sRel = (({0.00016, 0.13128, -0.01362}*...MuscleRefFrameTransformation.CalcaneusMusRefAxes'*...MuscleRefFrameTransformation.Metatarsal4MusRefAxes) + (...MuscleRefFrameTransformation.CalcaneusMusRefr-...MuscleRefFrameTransformation.Metatarsal4MusRefr)*...MuscleRefFrameTransformation.Metatarsal4MusRefAxes)*.Mirror*.MusScaleMat*..ScaleMat;
//    AnyDrawNode drw = {
//      ScaleXYZ = 0.0016*{1,1,1};
//      RGB = {0,0,1};
//    };
//  };
//};//Metatarsal4


//*********************************
//DI, origins are strange, reviewed
//*********************************

AnyViaPointMuscle DorsalInterosseous1Part1 =
{
  AnyMuscleModel &MusMdl = ..MusPar.DorsalInterosseous1Part1 ;
  AnyRefFrame &Org = .Segments.Metatarsal2.DI1_Org1;
  AnyRefFrame &Ins = .Segments.ProximalPhalange2.DI1_Ins;
  AnyDrawMuscle DrwMus = {#include "<ANYBODY_PATH_BODY>/drawSettings/MusDrawSettings.any"};
};


AnyViaPointMuscle DorsalInterosseous1Part2 =
{
  AnyMuscleModel &MusMdl = ..MusPar.DorsalInterosseous1Part2 ;
  AnyRefFrame &Org = .Segments.Metatarsal1.DI1_Org2;
  AnyRefFrame &Ins = .Segments.ProximalPhalange2.DI1_Ins;
  AnyDrawMuscle DrwMus = {#include "<ANYBODY_PATH_BODY>/drawSettings/MusDrawSettings.any"};
};


AnyViaPointMuscle DorsalInterosseous2Part1 =
{
  AnyMuscleModel &MusMdl = ..MusPar.DorsalInterosseous2Part1 ;
  AnyRefFrame &Org = .Segments.Metatarsal2.DI2_Org1;
  AnyRefFrame &Ins = .Segments.ProximalPhalange2.DI2_Ins;
  AnyDrawMuscle DrwMus = {#include "<ANYBODY_PATH_BODY>/drawSettings/MusDrawSettings.any"};
};


AnyViaPointMuscle DorsalInterosseous2Part2 =
{
  AnyMuscleModel &MusMdl = ..MusPar.DorsalInterosseous2Part2 ;
  AnyRefFrame &Org = .Segments.Metatarsal3.DI2_Org2;
  AnyRefFrame &Ins = .Segments.ProximalPhalange2.DI2_Ins;
  AnyDrawMuscle DrwMus = {#include "<ANYBODY_PATH_BODY>/drawSettings/MusDrawSettings.any"};
};


AnyViaPointMuscle DorsalInterosseous3Part1 =
{
  AnyMuscleModel &MusMdl = ..MusPar.DorsalInterosseous3Part1 ;
  AnyRefFrame &Org = .Segments.Metatarsal3.DI3_Org1;
  AnyRefFrame &Ins = .Segments.ProximalPhalange3.DI3_Ins;
  AnyDrawMuscle DrwMus = {#include "<ANYBODY_PATH_BODY>/drawSettings/MusDrawSettings.any"};
};


AnyViaPointMuscle DorsalInterosseous3Part2 =
{
  AnyMuscleModel &MusMdl = ..MusPar.DorsalInterosseous3Part2 ;
  AnyRefFrame &Org = .Segments.Metatarsal4.DI3_Org2;
  AnyRefFrame &Ins = .Segments.ProximalPhalange3.DI3_Ins;
  AnyDrawMuscle DrwMus = {#include "<ANYBODY_PATH_BODY>/drawSettings/MusDrawSettings.any"};
};

AnyViaPointMuscle DorsalInterosseous4Part1 =
{
  AnyMuscleModel &MusMdl = ..MusPar.DorsalInterosseous4Part1 ;
  AnyRefFrame &Org = .Segments.Metatarsal4.DI4_Org1;
  AnyRefFrame &Ins = .Segments.ProximalPhalange4.DI4_Ins;
  AnyDrawMuscle DrwMus = {#include "<ANYBODY_PATH_BODY>/drawSettings/MusDrawSettings.any"};
};

//Not present in yamaguchi data, but should be there
AnyViaPointMuscle DorsalInterosseous4Part2 =
{
  AnyMuscleModel &MusMdl = ..MusPar.DorsalInterosseous4Part2 ;
  AnyRefFrame &Org = .Segments.Metatarsal5.DI4_Org2;
  AnyRefFrame &Ins = .Segments.ProximalPhalange4.DI4_Ins;
  AnyDrawMuscle DrwMus = {#include "<ANYBODY_PATH_BODY>/drawSettings/MusDrawSettings.any"};
};


    //Original location for the origin
    //*********************************
//  AnyRefNode DI1_Org1 = {
//    sRel = {0.03196, 0.10347, .....Sign*-0.00072}*.MusScaleMat*..ScaleMat;
//    AnyDrawNode drw = {
//      ScaleXYZ = 0.0016*{1,1,1};
//      RGB = {0,0,1};
//    };
//  };
//
//  AnyRefNode DI1_Org2 = {
//    sRel = {0.04572, 0.10431, .....Sign*0.00051}*.MusScaleMat*..ScaleMat;
//    AnyDrawNode drw = {
//      ScaleXYZ = 0.0016*{1,1,1};
//      RGB = {0,0,1};
//    };
//  };

//  AnyRefNode DI2_Org1 = {
//    sRel = {0.03143, 0.10348, .....Sign*-0.00374}*.MusScaleMat*..ScaleMat;
//    AnyDrawNode drw = {
//      ScaleXYZ = 0.0016*{1,1,1};
//      RGB = {0,0,1};
//    };
//  };
//
//  AnyRefNode DI2_Org2 = {
//    sRel = {0.0415, 0.10554, .....Sign*-0.00929}*.MusScaleMat*..ScaleMat;
//    AnyDrawNode drw = {
//      ScaleXYZ = 0.0016*{1,1,1};
//      RGB = {0,0,1};
//    };
//  };

//  AnyRefNode DI3_Org1 = {
//    sRel = {0.02119, 0.09567, .....Sign*-0.01540}*.MusScaleMat*..ScaleMat;
//    AnyDrawNode drw = {
//      ScaleXYZ = 0.0016*{1,1,1};
//      RGB = {0,0,1};
//    };
//  };
//
//  AnyRefNode DI3_Org2 = {
//    sRel = {0.02742, 0.10402, .....Sign*-0.02451}*.MusScaleMat*..ScaleMat;
//    AnyDrawNode drw = {
//      ScaleXYZ = 0.0016*{1,1,1};
//      RGB = {0,0,1};
//    };
//  };

//  AnyRefNode DI4_Org1 = {
//    sRel = {0.01809, 0.08484, .....Sign*-0.02834}*.MusScaleMat*..ScaleMat;
//    AnyDrawNode drw = {
//      ScaleXYZ = 0.0016*{1,1,1};
//      RGB = {0,0,1};
//    };
//  };


  //Modified origins (graphicaly adjusted)
  //**************************************


// insertion in tendon of longus, should be same path as longus until distal phalanx
//*************************
//ExtensorDigitoriumBrevis
//*************************

AnyViaPointMuscle ExtensorDigitoriumBrevis2 =
{
  AnyMuscleModel &MusMdl = ..MusPar.ExtensorDigitoriumBrevis2;
  AnyRefFrame &Org = .Segments.Calcaneus.EDB_Org; // calca
  AnyRefFrame &Via1 = .Segments.Metatarsal3.EDB2_Via1; //MT3
  AnyRefFrame &Via2Bis = .Segments.Metatarsal2.EDB2_Via2Bis; //MT2
  AnyRefFrame &Via2 = .Segments.Metatarsal2.EDB2_Via2; //MT2
//  AnyRefFrame &Via3 = .Segments.ProximalPhalange2.EDB2_Via3; //proxi2
//  AnyRefFrame &Via4 = .Segments.MiddlePhalange2.EDB2_Via4; //midle 2 tendon
//  AnyRefFrame &Ins = .Segments.DistalPhalange2.EDB2_Ins; //distal phalanx2
  AnyDrawMuscle DrwMus = {#include "<ANYBODY_PATH_BODY>/drawSettings/MusDrawSettings.any"};
};


AnyViaPointMuscle ExtensorDigitoriumBrevis3 =
{
  AnyMuscleModel &MusMdl = ..MusPar.ExtensorDigitoriumBrevis3;
  AnyRefFrame &Org = .Segments.Calcaneus.EDB_Org; // calca
  AnyRefFrame &Via0 = .Segments.Metatarsal3.EDB3_Via0; //MT3
  AnyRefFrame &Via1Bis = .Segments.Metatarsal3.EDB3_Via1Bis; //MT3
  AnyRefFrame &Via1 = .Segments.Metatarsal3.EDB3_Via1; //MT3
//  AnyRefFrame &Via2 = .Segments.ProximalPhalange3.EDB3_Via2; //proxi3
//  AnyRefFrame &Via3 = .Segments.MiddlePhalange3.EDB3_Via3; //middle 3 tendon
//  AnyRefFrame &Ins = .Segments.DistalPhalange3.EDB3_Ins; //distal phalanx3
  AnyDrawMuscle DrwMus = {#include "<ANYBODY_PATH_BODY>/drawSettings/MusDrawSettings.any"};
};


AnyViaPointMuscle ExtensorDigitoriumBrevis4 =
{
  AnyMuscleModel &MusMdl = ..MusPar.ExtensorDigitoriumBrevis4;
  AnyRefFrame &Org = .Segments.Calcaneus.EDB_Org; // calca
  AnyRefFrame &Via1Bis = .Segments.Metatarsal4.EDB4_Via1Bis; //MT4
  AnyRefFrame &Via1 = .Segments.Metatarsal4.EDB4_Via1; //MT4
//  AnyRefFrame &Via2 = .Segments.ProximalPhalange4.EDB4_Via2; //proxi4
//  AnyRefFrame &Via3 = .Segments.MiddlePhalange4.EDB4_Via3; //middle 4 tendon
//  AnyRefFrame &Ins = .Segments.DistalPhalange4.EDB4_Ins; //distal phalanx4
  AnyDrawMuscle DrwMus = {#include "<ANYBODY_PATH_BODY>/drawSettings/MusDrawSettings.any"};
};


//Those insertion and via points replace the original ones in order to simulate the longus tenton insertion.


//Segments.ProximalPhalange2 = {
//  AnyRefNode EDB2_Via3 = {
//    sRel = .ExtensorDigitorumLongusViaNode7.sRel;
//  };
//};
//
//Segments.MiddlePhalange2 = {
//  AnyRefNode EDB2_Via4 = {
//    sRel = .ExtensorDigitorumLongusViaNode8.sRel;
//  };
//
//  AnyRefNode EDB2_Ins = {
//    sRel = .ExtensorDigitorumLongusNode.sRel;
//  };
//};
//
//Segments.DistalPhalange2 = {
//  AnyRefNode EDB2_Ins = {
//    sRel = .ExtensorDigitorumLongusNode.sRel;
//  };
//};


//Segments.ProximalPhalange3 = {
//  AnyRefNode EDB3_Via2 = {
//    sRel = .ExtensorDigitorumLongusViaNode10.sRel;
//  };
//};
//
//Segments.MiddlePhalange3 = {
//  AnyRefNode EDB3_Via3 = {
//    sRel = .ExtensorDigitorumLongusViaNode11.sRel;
//  };
//
//  AnyRefNode EDB3_Ins = {
//    sRel = .ExtensorDigitorumLongusNode.sRel;
//  };
//};
//
//Segments.DistalPhalange3 = {
//  AnyRefNode EDB3_Ins = {
//    sRel = .ExtensorDigitorumLongusNode.sRel;
//  };
//};


//Segments.ProximalPhalange4 = {
//  AnyRefNode EDB4_Via2 = {
//    sRel = .ExtensorDigitorumLongusViaNode13.sRel;
//  };
//};
//
//Segments.MiddlePhalange4 = {
//  AnyRefNode EDB4_Via3 = {
//    sRel = .ExtensorDigitorumLongusViaNode14.sRel;
//  };
//
//  AnyRefNode EDB4_Ins = {
//    sRel = .ExtensorDigitorumLongusNode.sRel;
//  };
//};
//
//Segments.DistalPhalange4 = {
//  AnyRefNode EDB4_Ins = {
//    sRel = .ExtensorDigitorumLongusNode.sRel;
//  };
//};


//*****************
//PI
//*****************

AnyViaPointMuscle PlantarInterosseous1 =
{
  AnyMuscleModel &MusMdl = ..MusPar.PlantarInterosseous1;
  AnyRefFrame &Org = .Segments.Metatarsal3.PI1_Org;
  AnyRefFrame &Ins = .Segments.ProximalPhalange3.PI1_Ins;
  AnyDrawMuscle DrwMus = {#include "<ANYBODY_PATH_BODY>/drawSettings/MusDrawSettings.any"};
};

AnyViaPointMuscle PlantarInterosseous2Part1 =
{
  AnyMuscleModel &MusMdl = ..MusPar.PlantarInterosseous2Part1;
  AnyRefFrame &Org = .Segments.Metatarsal4.PI2_Org1;
  AnyRefFrame &Ins = .Segments.ProximalPhalange4.PI2_Ins;
  AnyDrawMuscle DrwMus = {#include "<ANYBODY_PATH_BODY>/drawSettings/MusDrawSettings.any"};
};

AnyViaPointMuscle PlantarInterosseous2Part2 =
{
  AnyMuscleModel &MusMdl = ..MusPar.PlantarInterosseous2Part2;
  AnyRefFrame &Org = .Segments.Metatarsal4.PI2_Org2;
  AnyRefFrame &Ins = .Segments.ProximalPhalange4.PI2_Ins;
  AnyDrawMuscle DrwMus = {#include "<ANYBODY_PATH_BODY>/drawSettings/MusDrawSettings.any"};
};


AnyViaPointMuscle PlantarInterosseous2Part3 =
{
  AnyMuscleModel &MusMdl = ..MusPar.PlantarInterosseous2Part3;
  AnyRefFrame &Org = .Segments.Metatarsal4.PI2_Org3;
  AnyRefFrame &Ins = .Segments.ProximalPhalange4.PI2_Ins;
  AnyDrawMuscle DrwMus = {#include "<ANYBODY_PATH_BODY>/drawSettings/MusDrawSettings.any"};
};


AnyViaPointMuscle PlantarInterosseous3Part1 =
{
  AnyMuscleModel &MusMdl = ..MusPar.PlantarInterosseous3Part1;
  AnyRefFrame &Org = .Segments.Metatarsal5.PI3_Org1;
  AnyRefFrame &Ins = .Segments.ProximalPhalange5.PI3_Ins;
  AnyDrawMuscle DrwMus = {#include "<ANYBODY_PATH_BODY>/drawSettings/MusDrawSettings.any"};
};


AnyViaPointMuscle PlantarInterosseous3Part2 =
{
  AnyMuscleModel &MusMdl = ..MusPar.PlantarInterosseous3Part2;
  AnyRefFrame &Org = .Segments.Metatarsal5.PI3_Org2;
  AnyRefFrame &Ins = .Segments.ProximalPhalange5.PI3_Ins;
  AnyDrawMuscle DrwMus = {#include "<ANYBODY_PATH_BODY>/drawSettings/MusDrawSettings.any"};
};


AnyViaPointMuscle PlantarInterosseous3Part3 =
{
  AnyMuscleModel &MusMdl = ..MusPar.PlantarInterosseous3Part3;
  AnyRefFrame &Org = .Segments.Metatarsal5.PI3_Org3;
  AnyRefFrame &Ins = .Segments.ProximalPhalange5.PI3_Ins;
  AnyDrawMuscle DrwMus = {#include "<ANYBODY_PATH_BODY>/drawSettings/MusDrawSettings.any"};
};


//stops at the middle phalanx.
//**********************
//FlexorDigitorumBrevis
//**********************

AnyViaPointMuscle FlexorDigitorumBrevis2 =
{
  AnyMuscleModel &MusMdl = ..MusPar.FlexorDigitorumBrevis2;
  AnyRefFrame &Org = .Segments.Calcaneus.FDB_Org; //calca
  AnyRefFrame &Via1 = .Segments.Cuboid.FDB2_Via1; //cuboid
  AnyRefFrame &Via2 = .Segments.Metatarsal2.FDB2_Via2; //MT2
  AnyRefFrame &Via3 = .Segments.ProximalPhalange2.FDB2_Via3; //proxi 2
  AnyRefFrame &Ins = .Segments.MiddlePhalange2.FDB2_Ins; //midle p2
  AnyDrawMuscle DrwMus = {#include "<ANYBODY_PATH_BODY>/drawSettings/MusDrawSettings.any"};
};

AnyViaPointMuscle FlexorDigitorumBrevis3 =
{
  AnyMuscleModel &MusMdl = ..MusPar.FlexorDigitorumBrevis3;
  AnyRefFrame &Org = .Segments.Calcaneus.FDB_Org;//calca
  AnyRefFrame &Via1 = .Segments.Cuboid.FDB3_Via1; //cuboid
  AnyRefFrame &Via2 = .Segments.Metatarsal3.FDB3_Via2; //MT3
  AnyRefFrame &Via3 = .Segments.ProximalPhalange3.FDB3_Via3; //proxi 3
  AnyRefFrame &Ins = .Segments.MiddlePhalange3.FDB3_Ins; //midle p3
  AnyDrawMuscle DrwMus = {#include "<ANYBODY_PATH_BODY>/drawSettings/MusDrawSettings.any"};
};


AnyViaPointMuscle FlexorDigitorumBrevis4 =
{
  AnyMuscleModel &MusMdl = ..MusPar.FlexorDigitorumBrevis4;
  AnyRefFrame &Org = .Segments.Calcaneus.FDB_Org;//calca
  AnyRefFrame &Via1 = .Segments.Cuboid.FDB4_Via1; //cuboid
  AnyRefFrame &Via2 = .Segments.Metatarsal4.FDB4_Via2; //MT4
  AnyRefFrame &Via3 = .Segments.ProximalPhalange4.FDB4_Via3; //proxi 4
  AnyRefFrame &Ins = .Segments.MiddlePhalange4.FDB4_Ins; //midle p4
  AnyDrawMuscle DrwMus = {#include "<ANYBODY_PATH_BODY>/drawSettings/MusDrawSettings.any"};
};

AnyViaPointMuscle FlexorDigitorumBrevis5 =
{
  AnyMuscleModel &MusMdl = ..MusPar.FlexorDigitorumBrevis5;
  AnyRefFrame &Org = .Segments.Calcaneus.FDB_Org;//calca
  AnyRefFrame &Via1 = .Segments.Cuboid.FDB5_Via1; //cuboid
  AnyRefFrame &Via2 = .Segments.Metatarsal5.FDB5_Via2; //MT5
  AnyRefFrame &Ins = .Segments.MiddlePhalange5.FDB5_Ins; //Middle 5
  AnyDrawMuscle DrwMus = {#include "<ANYBODY_PATH_BODY>/drawSettings/MusDrawSettings.any"};
};


//*********************************************
//QuadratusPlantar (M/L), Tendon insertion!!!!
//*********************************************

AnyViaPointMuscle QuadratusPlantarMedialis1 =
{
  AnyMuscleModel &MusMdl = ..MusPar.QuadratusPlantarMedialis1;
  AnyRefFrame &Org = .Segments.Calcaneus.QPM_Org1; //calca
  AnyRefFrame &Ins = .Segments.FDLDummySeg.QP_Ins1; //tendon
  AnyDrawMuscle DrwMus = {#include "<ANYBODY_PATH_BODY>/drawSettings/MusDrawSettings.any"};
};

AnyViaPointMuscle QuadratusPlantarMedialis2 =
{
  AnyMuscleModel &MusMdl = ..MusPar.QuadratusPlantarMedialis2;
  AnyRefFrame &Org = .Segments.Calcaneus.QPM_Org2; //calca
  AnyRefFrame &Ins = .Segments.FDLDummySeg.QP_Ins2; //tendon
  AnyDrawMuscle DrwMus = {#include "<ANYBODY_PATH_BODY>/drawSettings/MusDrawSettings.any"};
};

AnyViaPointMuscle QuadratusPlantarMedialis3 =
{
  AnyMuscleModel &MusMdl = ..MusPar.QuadratusPlantarMedialis3;
  AnyRefFrame &Org = .Segments.Calcaneus.QPM_Org3; //calca
  AnyRefFrame &Ins = .Segments.FDLDummySeg.QP_Ins3; //tendon
  AnyDrawMuscle DrwMus = {#include "<ANYBODY_PATH_BODY>/drawSettings/MusDrawSettings.any"};
};

AnyViaPointMuscle QuadratusPlantarLateralis1 =
{
  AnyMuscleModel &MusMdl = ..MusPar.QuadratusPlantarLateralis1;
  AnyRefFrame &Org = .Segments.Calcaneus.QPL_Org1; //calca
  AnyRefFrame &Ins = .Segments.FDLDummySeg.QP_Ins1; //tendon
  AnyDrawMuscle DrwMus = {#include "<ANYBODY_PATH_BODY>/drawSettings/MusDrawSettings.any"};
};

AnyViaPointMuscle QuadratusPlantarLateralis2 =
{
  AnyMuscleModel &MusMdl = ..MusPar.QuadratusPlantarLateralis2;
  AnyRefFrame &Org = .Segments.Calcaneus.QPL_Org2; //calca
  AnyRefFrame &Ins = .Segments.FDLDummySeg.QP_Ins2; //tendon
  AnyDrawMuscle DrwMus = {#include "<ANYBODY_PATH_BODY>/drawSettings/MusDrawSettings.any"};
};

AnyViaPointMuscle QuadratusPlantarLateralis3 =
{
  AnyMuscleModel &MusMdl = ..MusPar.QuadratusPlantarLateralis3;
  AnyRefFrame &Org = .Segments.Calcaneus.QPL_Org3; //calca
  AnyRefFrame &Ins = .Segments.FDLDummySeg.QP_Ins3; //tendon
  AnyDrawMuscle DrwMus = {#include "<ANYBODY_PATH_BODY>/drawSettings/MusDrawSettings.any"};
};


//*********************************
//Lumbrical, tendon insertion!!!!! and via points are wrapping around ADHT / transverse lig ??
//*********************************

AnyViaPointMuscle Lumbrical2 =
{
  AnyMuscleModel &MusMdl = ..MusPar.Lumbrical2;
  AnyRefFrame &Org = .Segments.FDLDummySeg.LB2_Org; //tendon
  AnyRefFrame &Via = .Segments.Metatarsal2.LB2_Via; //meta2
  AnyRefFrame &Ins = .Segments.ProximalPhalange2.LB2_Ins; //proxi2
  AnyDrawMuscle DrwMus = {#include "<ANYBODY_PATH_BODY>/drawSettings/MusDrawSettings.any"};
};

AnyViaPointMuscle Lumbrical3 =
{
  AnyMuscleModel &MusMdl = ..MusPar.Lumbrical3;
  AnyRefFrame &Org = .Segments.FDLDummySeg.LB3_Org; //tendon
  AnyRefFrame &Via = .Segments.Metatarsal3.LB3_Via; //meta3
  AnyRefFrame &Ins = .Segments.ProximalPhalange3.LB3_Ins; //proxi3
  AnyDrawMuscle DrwMus = {#include "<ANYBODY_PATH_BODY>/drawSettings/MusDrawSettings.any"};
};

AnyViaPointMuscle Lumbrical4 =
{
  AnyMuscleModel &MusMdl = ..MusPar.Lumbrical4;
  AnyRefFrame &Org = .Segments.FDLDummySeg.LB4_Org; //tendon
  AnyRefFrame &Via = .Segments.Metatarsal4.LB4_Via; //meta4
  AnyRefFrame &Ins = .Segments.ProximalPhalange4.LB4_Ins; //proxi4
  AnyDrawMuscle DrwMus = {#include "<ANYBODY_PATH_BODY>/drawSettings/MusDrawSettings.any"};
};

AnyViaPointMuscle Lumbrical5 =
{
  AnyMuscleModel &MusMdl = ..MusPar.Lumbrical5;
  AnyRefFrame &Org = .Segments.FDLDummySeg.LB5_Org; //tendon
  AnyRefFrame &Via = .Segments.Metatarsal5.LB5_Via; //meta5
  AnyRefFrame &Ins = .Segments.ProximalPhalange5.LB5_Ins; //proxi5
  AnyDrawMuscle DrwMus = {#include "<ANYBODY_PATH_BODY>/drawSettings/MusDrawSettings.any"};
};


//*********************
//AbductorDigitiMinimi
//*********************

AnyViaPointMuscle AbductorDigitiMinimi1 =
{
  AnyMuscleModel &MusMdl = ..MusPar.AbductorDigitiMinimi1;
  AnyRefFrame &Org = .Segments.Calcaneus.ABDM_Org1; //calca
  AnyRefFrame &Via1 = .Segments.Metatarsal5.ABDM_Via1; //MT5
  AnyRefFrame &Via2 = .Segments.Metatarsal5.ABDM_Via2; //MT5
  AnyRefFrame &Ins = .Segments.ProximalPhalange5.ABDM_Ins; //proxi5
  AnyDrawMuscle DrwMus = {#include "<ANYBODY_PATH_BODY>/drawSettings/MusDrawSettings.any"};
};

AnyViaPointMuscle AbductorDigitiMinimi2 =
{
  AnyMuscleModel &MusMdl = ..MusPar.AbductorDigitiMinimi2;
  AnyRefFrame &Org = .Segments.Calcaneus.ABDM_Org2; //calca
  AnyRefFrame &Via1 = .Segments.Metatarsal5.ABDM_Via1; //MT5
  AnyRefFrame &Via2 = .Segments.Metatarsal5.ABDM_Via2; //MT5
  AnyRefFrame &Ins = .Segments.ProximalPhalange5.ABDM_Ins; //proxi5
  AnyDrawMuscle DrwMus = {#include "<ANYBODY_PATH_BODY>/drawSettings/MusDrawSettings.any"};
};

AnyViaPointMuscle AbductorDigitiMinimi3 =
{
  AnyMuscleModel &MusMdl = ..MusPar.AbductorDigitiMinimi3;
  AnyRefFrame &Org = .Segments.Calcaneus.ABDM_Org3; //calca
  AnyRefFrame &Via1 = .Segments.Metatarsal5.ABDM_Via1; //MT5
  AnyRefFrame &Via2 = .Segments.Metatarsal5.ABDM_Via2; //MT5
  AnyRefFrame &Ins = .Segments.ProximalPhalange5.ABDM_Ins; //proxi5
  AnyDrawMuscle DrwMus = {#include "<ANYBODY_PATH_BODY>/drawSettings/MusDrawSettings.any"};
};


//***************************
//FlexorDigitiMinimiBrevis, Should wrap around meta 5 ??
//****************************

AnyViaPointMuscle FlexorDigitiMinimiBrevis =
{
  AnyMuscleModel &MusMdl = ..MusPar.FlexorDigitiMinimiBrevis;
  AnyRefFrame &Org = .Segments.Metatarsal5.FDMB_Org;
  AnyRefFrame &Via = .Segments.Metatarsal5.FDMB_Via;
  AnyRefFrame &Ins = .Segments.ProximalPhalange5.FDMB_Ins;
  AnyDrawMuscle DrwMus = {#include "<ANYBODY_PATH_BODY>/drawSettings/MusDrawSettings.any"};
};
