#include "DrawSettings.any"

HumanModel =
{
  // This class templates adds changes to
  // the HumanModel, Mannequin, Scaling etc. to allow
  // for the GM foot model.
  GM_FOOT_Mixin GMFootMixin = {

  };


  BodyModel = {
    Right = {
      #ifdef SignRef
        #undef SignRef
      #endif
      #define SignRef 1
      #define _LEFT_RIGHT_ "Right"

      #include "GM_foot.root.any"

      #undef _LEFT_RIGHT_
   }; // Right

    Left = {
      #ifdef SignRef
        #undef SignRef
      #endif
      #define SignRef -1
      #define _LEFT_RIGHT_ "Left"

      #include "GM_foot.root.any"

      #undef _LEFT_RIGHT_
   }; // Left

 }; // BodyModel

}; //  HumanModel
