#define ANYBODY_PATH_OUTPUT "."
#include "../FootGM/GM_Foot_libdef.any"
#include "libdef.any"
#include "<ANYBODY_PATH_MODELUTILS>/Video/CameraClassTemplate.any"

Main = {


  // This is a simple example of using the camera class to create videos.
  VideoLookAtCamera Cam1 (UP_DIRECTION = y, CREATE_GIF = 1) =
  {

        VideoInputScale = 4;
//
//       ConstantRateFactor = 11;

       VideoResolution = {1080,1080};

       GifResolution = {300,300};
       GifOutputFrameRate = 20;

       VideoName = "GM_foot";

       // The point the camera focus on
       CameraLookAtPoint = Main.HumanModel.BodyModel.Right.Leg.Seg.LateralCuneiform.r+{0,0.1,0};

       // The vertical field of view in meters at the LookAtPoint
       CameraFieldOfView = 0.45;

       // The direction which the camera is placed
       // (In global coordinates with respect to the LookAtPoint)
       CameraDirection  = {cos(2*pi*Main.Study.t),0.6,sin(2*pi*Main.Study.t) };


       // The operations which should be included in the video.
       Analysis = {
           AnyOperation &ref = Main.Study.Kinematics;
       };
   };


  // ----------------------------------------------------------
  // Model configuration:
  // For more info on body model configuration options please load the model and double click on:
  // #path HTML_DOC "<AMMR_PATH_DOC>/bm_config/index.html"
  // ----------------------------------------------------------
  #define BM_LEG_MUSCLES_BOTH ON
  #define BM_LEG_LEFT OFF
  #define BM_ARM_LEFT OFF
  #define BM_ARM_RIGHT OFF
  #define BM_TRUNK_MUSCLES OFF

Main.DrawSettings.Muscle.Opacity = 0.2;
Main.HumanModel.Mannequin.Posture.Right.AnklePlantarFlexion = 8;
// // Setup required for using th GM foot model
// #define BM_SCALING _SCALING_XYZ_
//  Main.HumanModel.Anthropometrics.SegmentScaleFactors.Right.Thigh.LengthScale = 1.2;
//  Main.HumanModel.Anthropometrics.SegmentScaleFactors.Left.Thigh.LengthScale = 1.2;
//  Main.HumanModel.Anthropometrics.SegmentScaleFactors.Right.Shank.LengthScale = 1.2;
//  Main.HumanModel.Anthropometrics.SegmentScaleFactors.Left.Shank.LengthScale = 1.2;


 #include "<GM_FOOT_PATH>/GM_foot_model.any"


  AnyFolder Model ={
    //AnyFolder &HumanModel=.HumanModel.BodyModel;
    //AnyFolder &CamRef =.HumanModel.BodyModel;

  };

  AnyBodyStudy Study = {
    AnyFolder &CamRef = Main.Cam1;
    Gravity = {0.0, -9.81, 0.0};
    nStep = 300;
    tArray= linspace(0, 1-1/nStep, nStep);
  }; // End of study

}; //Main
