//define = (
//   [
//    {'BM_LEG_MUSCLES_BOTH':'OFF'},
//    {'BM_LEG_MUSCLES_BOTH':'_MUSCLES_SIMPLE_'},
//    {'BM_LEG_MUSCLES_BOTH':'_MUSCLES_3E_HILL_'},
//  ])

#define ANYBODY_PATH_OUTPUT "."
#include "../libdef.any"


Main = {


  // ----------------------------------------------------------
  // Model configuration:
  // For more info on body model configuration options please load the model and double click on:
  // #path HTML_DOC "<AMMR_PATH_DOC>/bm_config/index.html"
  // ----------------------------------------------------------
  #ifndef TEST_NAME
  #define BM_LEG_MUSCLES_BOTH ON
  #endif

 // Setup required for using th GM foot model
 #define BM_LEG_MODEL _LEG_MODEL_TLEM2_
 #define BM_FOOT_MODEL _FOOT_MODEL_NONE_
 #define BM_SCALING _SCALING_USERDEFINED_
  #path BM_SCALING_FILE "ScalingLengthMassFat.any"


  #include "<ANYBODY_PATH_BODY>/HumanModel.any"

  #include "FootGM.any"


  AnyFolder Model ={
    AnyFolder &HumanModel=.HumanModel.BodyModel;

  };

  AnyBodyStudy Study = {
    AnyFolder &Model = .Model;
    tEnd = 1.0;
    Gravity = {0.0, -9.81, 0.0};
    nStep = 1;
  }; // End of study

}; //Main
